*Heading
** 三维梁链非线性：120 个 B31 单元
*Part, name=BEAM_CHAIN
*Node
1, 0.000000, 0.0, 0.0
2, 0.100000, 0.0, 0.0
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*Material, name=STEEL
*Elastic
2.1e11, 0.3
*Element, type=B31, elset=CHAIN
1, 1, 2
2, 2, 3
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*Beam Section, elset=CHAIN, material=STEEL
8.0e-5
*End Part
*Boundary
1,1,6,0.0
*Cload
121,2,-8.0e4
*Step, name=BEAM_NL, nlgeom=YES
*Static
0.05, 1.0, 1e-4, 0.1
*Controls
40, 15, 4, 0.8, 1.2, 1e-4, 0.2
*Output, field, frequency=5
*End Step
