*Heading
** 双块压缩接触：C3D8 共 512 单元（接触+摩擦+非线性）
*Node
1, 0.000000, 0.000000, 0.000000
2, 0.125000, 0.000000, 0.000000
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*Material, name=STEEL
*Elastic
2.1e11, 0.3
*Element, type=C3D8, elset=BOT
1, 1, 2, 11, 10, 82, 83, 92, 91
2, 2, 3, 12, 11, 83, 84, 93, 92
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*Element, type=C3D8, elset=TOP
257, 406, 407, 416, 415, 487, 488, 497, 496
258, 407, 408, 417, 416, 488, 489, 498, 497
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*Nset, nset=MASTER_SURF
325, 326, 327, 328, 329, 330
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*Nset, nset=SLAVE_SURF
406, 407, 408, 409, 410, 411
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*Nset, nset=BOT_FIX
1, 2, 3, 4, 5, 6
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*Nset, nset=TOP_LOAD
730, 731, 732, 733, 734, 735
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*Contact Pair, master=MASTER_SURF, slave=SLAVE_SURF, penalty=2.0e8, friction=0.2
*Boundary
BOT_FIX,1,3,0.0
*Cload
730, 3, -150.0
731, 3, -150.0
732, 3, -150.0
733, 3, -150.0
734, 3, -150.0
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810, 3, -150.0
*Step, name=CONTACT_512, nlgeom=YES
*Static
0.05, 1.0, 1e-4, 0.1
*Controls
60, 20, 5, 0.7, 1.2, 1e-4, 0.15
*Output, field, frequency=10
*End Step
