*Heading
** S4 薄板弯曲：16x16 共 256 单元
*Part, name=SHELL_PLATE
*Node
1, 0.000000, 0.000000, 0.000000
2, 0.100000, 0.000000, 0.000000
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*Material, name=STEEL
*Elastic
2.1e11, 0.3
*Element, type=S4, elset=PLATE
1, 1, 2, 19, 18
2, 2, 3, 20, 19
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*Shell Section, elset=PLATE, material=STEEL
0.01
*End Part
*Nset, nset=LEFT_EDGE
1, 18, 35, 52, 69, 86
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*Boundary
LEFT_EDGE,1,6,0.0
*Cload
153, 3, -2.0e4
*Step, name=SHELL_LINEAR
*Static
1.0
*End Step
